Y(x) := sin(3*x) + cos(x)
b(x) := 1, 5
y(x) := 1/(2*x - 3)
y(x) := (x^2 + 1)/(x - 1)
b(x) := 1
f(x) := limit(y(x)/x, x → ∞)*x + limit(y(x) - x, x → ∞) → x + 1
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f(x) := limit(y(x)/x, x → ∞)*x + limit(y(x) - x, x → ∞) → x + 1
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