ORIGIN := 1
Γ := 3
Ν := 25  # задание 1 и 2
# команда Origin меняет показатель
# отсчетf на 1
V := [3 + 25 + 1; 3 + 25 + 2; 3 + 25 + 3]
V = [29; 30; 31]
M := [
    3 + 25 + 1, 3 + 25 + 2, 3 + 25 + 3;
    3 + 25 + 4, 3 + 25 + 5, 3 + 25 + 6;
    3 + 25 + 7, 3 + 25 + 8, 3 + 25 + 9
]
cols(V) = 1
cols(M) = 3
rows(V) = 3
rows(M) = 3
|M| = 0
a := Γ*Ν = 75
b := Γ + Ν = 28  # задание 3
M = [29, 30, 31; 32, 33, 34; 35, 36, 37]
|V| = 51.9808
length(V) = 3
last(V) = 3
M1 := [2/(a - b), 2/(a - b); (a - b)/2, (a - b)/2]
M1 = [0.0425532, 0.0425532; 23.5, 23.5]
# задание 4
|M1| = 0
M1 → [2/47, 2/47; 47/2, 47/2]
M2[1, 1] := Γ + Ν + 1
M2[2, 1] := Γ + Ν + 3
|M1| → 0 = 0
M2[2, 2] := Γ + Ν + 4
M2[1, 2] := Γ + Ν + 2
M1[1, 1] = 0.0425532
M1[1, 1] → 2/47
M1[1, 2] = 0.0425532
M1[1, 2] → 2/47
M2 := [M2[1, 1], M2[1, 2]; M2[2, 1], M2[2, 2]] = [29, 30; 31, 32]
M2 = [29, 30; 31, 32]
M1[2, 1] = 23.5
M1[2, 1] → 47/2
M1[2, 2] = 23.5
# задание 5
M1[2, 2] → 47/2
V1 := M[:, 1] = [29; 32; 35]
V2 := transpose(M)[:, 1] = [29; 30; 31]
transpose(V2) = [29, 30, 31]
V1 = [29; 32; 35]
Г := 3
# задание 6
N := 25
i2 := 1 .. 8
j2 := i2
i3 := 1 .. 4
S[i2, j2] := N*i2 + Г*j2
S = [
    28, 31, 34, 37, 40, 43, 46, 49;
    53, 56, 59, 62, 65, 68, 71, 74;
    78, 81, 84, 87, 90, 93, 96, 99;
    103, 106, 109, 112, 115, 118, 121, 124;
    128, 131, 134, 137, 140, 143, 146, 149;
    153, 156, 159, 162, 165, 168, 171, 174;
    178, 181, 184, 187, 190, 193, 196, 199;
    203, 206, 209, 212, 215, 218, 221, 224
]
X[i3] := 2*Γ*i3 + 2*Ν
Y[i3] := X[i3]^2
X = [56; 62; 68; 74]
Y = [3136; 3844; 4624; 5476]
A[i3, 1] := X[i3]
A[i3, 2] := Y[i3]
A = [56, 3136; 62, 3844; 68, 4624; 74, 5476]
WRITEPRN("25_ФРОЛОВ_АНДРЕЙА0") := A
WRITEPRN("25_ФРОЛОВ_АНДРЕЙА1") := S
R[i2, j2] := S[i2, j2]^2
R = [
    784, 961, 1156, 1369, 1600, 1849, 2116, 2401;
    2809, 3136, 3481, 3844, 4225, 4624, 5041, 5476;
    6084, 6561, 7056, 7569, 8100, 8649, 9216, 9801;
    10609, 11236, 11881, 12544, 13225, 13924, 14641, 15376;
    16384, 17161, 17956, 18769, 19600, 20449, 21316, 22201;
    23409, 24336, 25281, 26244, 27225, 28224, 29241, 30276;
    31684, 32761, 33856, 34969, 36100, 37249, 38416, 39601;
    41209, 42436, 43681, 44944, 46225, 47524, 48841, 50176
]
WRITEPRN("25_ФРОЛОВ_АНДРЕЙА2") := R
# Задание 7
A2 := READPRN("25_ФРОЛОВ_АНДРЕЙА2.prn")
A2 = [
    784, 961, 1156, 1369, 1600, 1849, 2116, 2401;
    2809, 3136, 3481, 3844, 4225, 4624, 5041, 5476;
    6084, 6561, 7056, 7569, 8100, 8649, 9216, 9801;
    10610, 11240, 11880, 12540, 13230, 13920, 14640, 15380;
    16380, 17160, 17960, 18770, 19600, 20450, 21320, 22200;
    23410, 24340, 25280, 26240, 27230, 28220, 29240, 30280;
    31680, 32760, 33860, 34970, 36100, 37250, 38420, 39600;
    41210, 42440, 43680, 44940, 46230, 47520, 48840, 50180
]
# Задание 8
a
L := [N + Г + 1, N + Г + 2, N + Г + 4; N + Г + 4, N + Г + 4, N + Г + 6; N + Г + 7, N + Г + 8, N + Г + 9] = [29, 30, 32; 32, 32, 34; 35, 36, 37]
K := [0, -1, -2; 1, 0, -1; 2, 1, 0]
L + K = [29, 29, 30; 33, 32, 33; 37, 37, 37]
i := 1 .. 3
j := 1 .. 3
M3[i, j] := L[i, j] + K[i, j]
M3 = [29, 29, 30; 33, 32, 33; 37, 37, 37]
б
L - K = [29, 31, 34; 31, 32, 35; 33, 35, 37]
M4[i, j] := L[i, j] - K[i, j]
M4 = [29, 31, 34; 31, 32, 35; 33, 35, 37]
в
N := 25
N + L = [54, 55, 57; 57, 57, 59; 60, 61, 62]
M5[i, j] := N + L[i, j]
M5 = [54, 55, 57; 57, 57, 59; 60, 61, 62]
г
N := 25
Г := 3
A3 := [N + Γ + 1, N + Γ + 3, N + Γ + 5, N + Γ + 7; N + Γ + 2, N + Γ + 4, N + Γ + 6, N + Γ + 8]
B3 := [N + Γ + 1, N + Γ + 5; N + Γ + 2, N + Γ + 6; N + Γ + 3, N + Γ + 7; N + Γ + 4, N + Γ + 8]
C3 := A3*B3
C3 = [3914, 4426; 4036, 4564]
sum(A3*B3, j = 1 .. 1) = [3914, 4426; 4036, 4564]
д
T := -N*L = [-725, -750, -800; -800, -800, -850; -875, -900, -925]
-L → [-29, -30, -32; -32, -32, -34; -35, -36, -37]
L*(-1) → [-29, -30, -32; -32, -32, -34; -35, -36, -37]
-N*L = [-725, -750, -800; -800, -800, -850; -875, -900, -925]
е
|C3| = 160
|V| → sqrt(2702)
|V| → sqrt(2702)
|C3| → 160
|V| = 51.9808
|V| =  # error: Эта матрица должна быть квадратной.
# V это вектор, а вектор не может быть квадратным
ж
X := [Ν + Γ + 10; Ν + Γ + 11; Ν + Γ + 12] = [38; 39; 40]
Y := [Ν + Γ + 13; Ν + Γ + 14; Ν + Γ + 15] = [41; 42; 43]
X*Y = 4916
sum(X[j]*Y[j], j = 1 .. 3) = 4916
з
Z := X×Y = [-3; 6; -3]
Z := [
    X[2, 1]*Y[3, 1] - Y[2, 1]*X[3, 1];
    -(X[1, 1]*Y[3, 1] - X[3, 1]*Y[1, 1]);
    X[1, 1]*Y[2, 1] - X[2, 1]*Y[1, 1]
] = [-3; 6; -3]
transpose(X) = [38, 39, 40]
|X| = 67.5648
|Y| = 72.7599
X = [38; 39; 40]
ϕ := acos(X*Y/(|X|*|Y|)) = 0.00149481
Z = [-3; 6; -3]
|Z| = 7.34847
Z1 := |X|*|Y|*sin(ϕ)
Z1 = 7.34847
Z2[1] := (-1)^(1 - 1)*[X[2, 1], X[3, 1]; Y[2, 1], Y[3, 1]] = [39, 40; 42, 43]
Z2[2] := (-1)^(2 - 1)*[X[1, 1], X[3, 1]; Y[2, 1], Y[3, 1]] = [-38, -40; -42, -43]
Z2[3] := (-1)^(3 - 1)*[X[1, 1], X[2, 1]; Y[1, 1], Y[2, 1]] = [38, 39; 41, 42]
и
sum(X) + sum(Y) = 243
X[1] + X[2] + X[3] + Y[1] + Y[2] + Y[3] = 243
к
tr(L) = 98
sum(L[j, j], j = 1 .. 2) = 61
л
M6 := [0, Ν*π/3; Ν*π/2, Ν*π] = [0, 26.1799; 39.2699, 78.5398]
vectorize(sin(M6)) = [0, 0.866025; 1, 0]
м
(Γ + Ν + 1)
A4 := [Γ + Ν + 9, Γ + Ν + 8, Γ + Ν + 7; Γ + Ν + 6, Γ + Ν + 5, Γ + Ν + 4; Γ + Ν + 3, Γ + Ν + 2, Γ + Ν + 9] = [37, 36, 35; 34, 33, 32; 31, 30, 37]
# Заменил на Γ + Ν + 9
A4^-1 → [-87/8, 47/4, 1/8; 133/12, -71/6, -1/4; 1/8, -1/4, 1/8]
|A4| → -24
A4^-1 = [-10.875, 11.75, 0.125; 11.0833, -11.8333, -0.25; 0.125, -0.25, 0.125]
B4[i, j] := (-1)^(i + j)*minor(A4[i, j])/|A4|  # error: Эта переменная не определена.
B[1, 1] := (-1)^(1 + 1)*det([19, 20; 27, 28])/|A4| = 0.333333
B[2, 1] := (-1)^(2 + 1)*det([22, 20; 26, 28])/|A4| = 4
B[3, 1] := (-1)^(3 + 1)*det([22, 19; 26, 27])/|A4| = -4.16667
B4[i, j] := (-1)^(i + j)*A4[i, j]/|A4|
B4[i, j] = [-1.54167; 1.41667; -1.29167; 1.5; -1.375; 1.25; -1.45833; 1.33333; -1.54167]
B[1, 2] := (-1)^(1 + 2)*det([23, 21; 27, 28])/|A4| = 3.20833
B[2, 2] := (-1)^(2 + 2)*det([20, 21; 26, 28])/|A4| = -0.583333
B[3, 2] := (-1)^(3 + 2)*det([20, 23; 26, 27])/|A4| = -2.41667
B[1, 3] := (-1)^(1 + 3)*det([23, 21; 19, 20])/|A4| = -2.54167
B[2, 3] := (-1)^(2 + 3)*det([20, 21; 22, 20])/|A4| = -2.58333
B[3, 3] := (-1)^(3 + 3)*det([20, 23; 22, 19])/|A4| = 5.25
B = [0.333333, 3.20833, -2.54167; 4, -0.583333, -2.58333; -4.16667, -2.41667, 5.25]
н
B5 := mod(N, 7) = 4
B5 := identity(mod(N, 5) + 2) = [1, 0; 0, 1]
A4*A4^-1 = [1, 8.70415e-14, 0; 2.44249e-14, 1, 0; -2.4869e-14, 0, 1]
A4^0 = [1, 0, 0; 0, 1, 0; 0, 0, 1]
о
V5 := [Г + N + 1; Г + N + 2; Г + N + 3] = [29; 30; 31]
п
C5 := diag(V5) = [29, 0, 0; 0, 30, 0; 0, 0, 31]
Z4 := submatrix(A4, 2, 3, 2, 3) = [33, 32; 30, 37]
Z5 := submatrix(A4, 3, 3, 2, 3) = [30, 37]
р
Z6 := submatrix(A4, 1, 3, 2, 2) = [36; 33; 30]
F := augment(V5, Z, Z6) = [29, -3, 36; 30, 6, 33; 31, -3, 30]
A4 = [37, 36, 35; 34, 33, 32; 31, 30, 37]
с
L = [29, 30, 32; 32, 32, 34; 35, 36, 37]
G := stack(A4, L) = [37, 36, 35; 34, 33, 32; 31, 30, 37; 29, 30, 32; 32, 32, 34; 35, 36, 37]
т
csort(F, 2) = [29, -3, 36; 31, -3, 30; 30, 6, 33]
у
rsort(F, 3) = [-3, 36, 29; 6, 33, 30; -3, 30, 31]
ф
V6 := [Ν + 6*mod(3, N) + 1; Ν + 2*mod(4, N) + 1; Ν + 8*mod(5, N) + 1]
# Добавлена константа N, так как mod выдаёт ошибку, что нужны 2 параметра
sort(V6) = [34; 44; 66]
х
reverse(V6) = [66; 34; 44]
# задание 9
[
    x1 - 2*x2 - x3 + 3*x4 == 11;
    -2*x1 + x2 + 3*x3 - 2*x4 == -9;
    2*x1 - x2 - 2*x3 + x4 == -2;
    2*x1 - 4*x3 + 3*x4 == 2
] solve, [x1, x2, x3, x4] → [-24, -18, -17, -6]
B := [11; -9; -2; 2]
A := [1, -2, -1, 3; -2, 1, 3, -2; 2, -1, -2, 1; 2, 0, -4, 3]
A^-1*B = [-24; -18; -17; -6]
lsolve(A, B) = [-24; -18; -17; -6]
# Применены 2 типа решения
